<?xml version="1.0"?>

<!-- Copyright (c) 2026 Josh Davidson (Octal450) -->

<fdm_config name="MD-11F-PW" version="2.0" release="BETA">

	<fileheader>
		<author>Josh Davidson (Octal450)</author>
		<description>KMD-11 FDE with PW4462 Engines</description>
	</fileheader>

	<aerodynamics file="FDE/Config/md-11-aerodynamics.xml"/>
	<external_reactions file="FDE/Config/md-11-external-reactions"/>
	<ground_reactions file="FDE/Config/md-11-ground-reactions"/>
	<mass_balance file="FDE/Config/md-11f-mass-balance"/>
	<metrics file="FDE/Config/md-11-metrics"/>

	<system file="md-11-core"/>
	<system file="md-11-electrical"/>
	<system file="md-11-fire"/>
	<system file="md-11-fuel"/>
	<system file="md-11-hydraulics"/>
	<system file="md-11-irs"/>
	<system file="md-11-pneumatics"/>
	<system file="md-11-hvac"/>
	<system file="md-11-pressurization"/>
	<system file="md-11-fms"/>
	<system file="md-11-fcc"/>
	<system file="md-11-fcs"/>
	<system file="md-11-spoilers"/>
	<system file="md-11-ignition"/>
	<system file="md-11-pw-engine-fadec"/>
	<system file="md-11-apu"/>
	<system file="md-11-tanker"/>
	<system file="md-11-misc"/>
	<system file="md-11-cockpit"/>
	<system file="md-11-instrumentation"/>

	<propulsion>
		<engine file="pw4462_1">
			<feed>8</feed>
			<thruster file="direct">
				<location unit="M">
					<x>-5.29297</x>
					<y>-4.14094</y>
					<z>3.47943</z>
				</location>
				<orient unit="DEG">
					<roll>0</roll>
					<pitch>2</pitch>
					<yaw>2</yaw>
				</orient>
			</thruster>
		</engine>

		<engine file="pw4462_2">
			<feed>9</feed>
			<thruster file="direct">
				<location unit="M">
					<x>25.2146</x>
					<y>0</y>
					<z>10.698</z>
				</location>
				<orient unit="DEG">
					<roll>0</roll>
					<pitch>0</pitch>
					<yaw>0</yaw>
				</orient>
			</thruster>
		</engine>

		<engine file="pw4462_3">
			<feed>10</feed>
			<thruster file="direct">
				<location unit="M">
					<x>-5.29297</x>
					<y>4.14094</y>
					<z>3.47943</z>
				</location>
				<orient unit="DEG">
					<roll>0</roll>
					<pitch>2</pitch>
					<yaw>-2</yaw>
				</orient>
			</thruster>
		</engine>

		<engine file="tscp700-4e">
			<feed>11</feed>
			<thruster file="direct">
				<location unit="M">
					<x>24.5364</x>
					<y>0</y>
					<z>7.95507</z>
				</location>
				<orient unit="DEG">
					<roll>0</roll>
					<pitch>0</pitch>
					<yaw>0</yaw>
				</orient>
			</thruster>
		</engine>

		<!-- Fuel Tank Capacities from Type Sheet, positions fudged for CG accuracy -->
		<tank type="FUEL"> <!-- Tank 1 Outboard -->
			<location unit="M">
				<x>4.65468</x>
				<y>-17.0253</y>
				<z>5.96573</z>
			</location>
			<capacity unit="LBS">6500</capacity>
			<contents unit="LBS">6500</contents>
			<standpipe unit="LBS">31</standpipe>
			<priority>1</priority>
			<type>JET-A1</type>
			<temperature>50</temperature>
		</tank>
		<tank type="FUEL"> <!-- Tank 1 Inboard -->
			<location unit="M">
				<x>3.39431</x>
				<y>-9.78756</y>
				<z>5.55365</z>
			</location>
			<capacity unit="LBS">33991</capacity>
			<contents unit="LBS">14500</contents>
			<standpipe unit="LBS">31</standpipe>
			<priority>1</priority>
			<type>JET-A1</type>
			<temperature>50</temperature>
		</tank>
		<tank type="FUEL"> <!-- Tank 2 -->
			<location unit="M">
				<x>0.85765</x>
				<y>0</y>
				<z>5.70658</z>
			</location>
			<capacity unit="LBS">64040</capacity>
			<contents unit="LBS">21000</contents>
			<standpipe unit="LBS">43</standpipe>
			<priority>1</priority>
			<type>JET-A1</type>
			<temperature>50</temperature>
		</tank>
		<tank type="FUEL"> <!-- Tank 3 Inboard -->
			<location unit="M">
				<x>3.39431</x>
				<y>9.78756</y>
				<z>5.55365</z>
			</location>
			<capacity unit="LBS">33991</capacity>
			<contents unit="LBS">14500</contents>
			<standpipe unit="LBS">31</standpipe>
			<priority>1</priority>
			<type>JET-A1</type>
			<temperature>50</temperature>
		</tank>
		<tank type="FUEL"> <!-- Tank 3 Outboard -->
			<location unit="M">
				<x>4.65468</x>
				<y>17.0253</y>
				<z>5.96573</z>
			</location>
			<capacity unit="LBS">6500</capacity>
			<contents unit="LBS">6500</contents>
			<standpipe unit="LBS">31</standpipe>
			<priority>1</priority>
			<type>JET-A1</type>
			<temperature>50</temperature>
		</tank>
		<tank type="FUEL"> <!-- Upper Aux Tank -->
			<location unit="M">
				<x>1.59574</x>
				<y>0</y>
				<z>5.09697</z>
			</location>
			<capacity unit="LBS">87111</capacity>
			<contents unit="LBS">0</contents>
			<standpipe unit="LBS">43</standpipe>
			<priority>1</priority>
			<type>JET-A1</type>
			<temperature>50</temperature>
		</tank>
		<tank type="FUEL"> <!-- Lower Aux Tank -->
			<location unit="M">
				<x>1.59574</x>
				<y>0</y>
				<z>4.18259</z>
			</location>
			<capacity unit="LBS">11000</capacity>
			<contents unit="LBS">0</contents>
			<standpipe unit="LBS">43</standpipe>
			<priority>1</priority>
			<type>JET-A1</type>
			<temperature>50</temperature>
		</tank>
		<tank type="FUEL"> <!-- Tail Tank -->
			<location unit="M">
				<x>15.47398</x>
				<y>0</y>
				<z>7.14628</z>
			</location>
			<capacity unit="LBS">13124</capacity>
			<contents unit="LBS">0</contents>
			<standpipe unit="LBS">31</standpipe>
			<priority>1</priority>
			<type>JET-A1</type>
			<temperature>50</temperature>
		</tank>
		<tank type="FUEL"> <!-- Engine 1 Pipe -->
			<location unit="M">
				<x>2.837</x>
				<y>0</y>
				<z>5.69282</z>
			</location>
			<capacity unit="LBS">10</capacity>
			<contents unit="LBS">0</contents>
			<priority>1</priority>
			<type>JET-A1</type>
		</tank>
		<tank type="FUEL"> <!-- Engine 2 Pipe -->
			<location unit="M">
				<x>2.837</x>
				<y>0</y>
				<z>5.69282</z>
			</location>
			<capacity unit="LBS">10</capacity>
			<contents unit="LBS">0</contents>
			<priority>1</priority>
			<type>JET-A1</type>
		</tank>
		<tank type="FUEL"> <!-- Engine 3 Pipe -->
			<location unit="M">
				<x>2.837</x>
				<y>0</y>
				<z>5.69282</z>
			</location>
			<capacity unit="LBS">10</capacity>
			<contents unit="LBS">0</contents>
			<priority>1</priority>
			<type>JET-A1</type>
		</tank>
		<tank type="FUEL"> <!-- APU Pipe -->
			<location unit="M">
				<x>2.837</x>
				<y>0</y>
				<z>5.69282</z>
			</location>
			<capacity unit="LBS">5</capacity>
			<contents unit="LBS">0</contents>
			<priority>1</priority>
			<type>JET-A1</type>
		</tank>
	</propulsion>

</fdm_config>
