<?xml version="1.0"?>

<!-- Copyright (c) 2022 Josh Davidson (Octal450) -->

<fdm_config name="MD-11" version="2.0" release="BETA">

	<fileheader>
		<author>Josh Davidson (Octal450)</author>
		<version>Pre V1.0</version>
		<description>MD-11 FDE</description>
	</fileheader>

	<metrics file="Systems/md-11-metrics"/>
	<mass_balance file="Systems/md-11f-mass-balance"/>
	<ground_reactions file="Systems/md-11-ground-reactions"/>

	<propulsion>
		<engine file="cf6-80c2d1f_1">
			<location unit="M">
				<x>-5.29297</x>
				<y>-4.14094</y>
				<z>3.47943</z>
			</location>
			<orient unit="DEG">
				<roll>0</roll>
				<pitch>2.2</pitch>
				<yaw>2</yaw>
			</orient>
			<feed>8</feed>
			<thruster file="direct">
				<location unit="M">
					<x>-5.29297</x>
					<y>-4.14094</y>
					<z>3.47943</z>
				</location>
				<orient unit="DEG">
					<roll>0</roll>
					<pitch>2.2</pitch>
					<yaw>2</yaw>
				</orient>
			</thruster>
		</engine>

		<engine file="cf6-80c2d1f_2">
			<location unit="M">
				<x>25.2146</x>
				<y>0</y>
				<z>10.698</z>
			</location>
			<orient unit="DEG">
				<roll>0</roll>
				<pitch>0</pitch>
				<yaw>0</yaw>
			</orient>
			<feed>9</feed>
			<thruster file="direct">
				<location unit="M">
					<x>25.2146</x>
					<y>0</y>
					<z>10.698</z>
				</location>
				<orient unit="DEG">
					<roll>0</roll>
					<pitch>0</pitch>
					<yaw>0</yaw>
				</orient>
			</thruster>
		</engine>

		<engine file="cf6-80c2d1f_3">
			<location unit="M">
				<x>-5.29297</x>
				<y>4.14094</y>
				<z>3.47943</z>
			</location>
			<orient unit="DEG">
				<roll>0</roll>
				<pitch>2.2</pitch>
				<yaw>-2</yaw>
			</orient>
			<feed>10</feed>
			<thruster file="direct">
				<location unit="M">
					<x>-5.29297</x>
					<y>4.14094</y>
					<z>3.47943</z>
				</location>
				<orient unit="DEG">
					<roll>0</roll>
					<pitch>2.2</pitch>
					<yaw>-2</yaw>
				</orient>
			</thruster>
		</engine>

		<engine file="tscp700-4e">
			<location unit="M">
				<x>24.5364</x>
				<y>0</y>
				<z>7.95507</z>
			</location>
			<orient unit="DEG">
				<roll>0</roll>
				<pitch>0</pitch>
				<yaw>0</yaw>
			</orient>
			<feed>11</feed>
			<thruster file="direct">
				<location unit="M">
					<x>24.5364</x>
					<y>0</y>
					<z>7.95507</z>
				</location>
				<orient unit="DEG">
					<roll>0</roll>
					<pitch>0</pitch>
					<yaw>0</yaw>
				</orient>
			</thruster>
		</engine>

		<!-- Fuel Tank Capacities from FCOM -->
		<tank type="FUEL">    <!-- Tank 1 Outboard -->
			<location unit="M">
				<x>2.7152</x>
				<y>-17.0253</y>
				<z>5.69282</z>
			</location>
			<capacity unit="LBS">6500</capacity>
			<contents unit="LBS">6500</contents>
			<standpipe unit="LBS">31</standpipe>
			<priority>2</priority>
			<type>JET-A1</type>
			<temperature>50</temperature>
		</tank>
		<tank type="FUEL">    <!-- Tank 1 Inboard -->
			<location unit="M">
				<x>2.7152</x>
				<y>-11.3314</y>
				<z>5.69282</z>
			</location>
			<capacity unit="LBS">33988</capacity>
			<contents unit="LBS">13500</contents>
			<standpipe unit="LBS">31</standpipe>
			<priority>2</priority>
			<type>JET-A1</type>
			<temperature>50</temperature>
		</tank>
		<tank type="FUEL">    <!-- Tank 2 -->
			<location unit="M">
				<x>2.7152</x>
				<y>0</y>
				<z>5.69282</z>
			</location>
			<capacity unit="LBS">64040</capacity>
			<contents unit="LBS">20000</contents>
			<standpipe unit="LBS">43</standpipe>
			<priority>1</priority>
			<type>JET-A1</type>
			<temperature>50</temperature>
		</tank>
		<tank type="FUEL">    <!-- Tank 3 Inboard -->
			<location unit="M">
				<x>2.7152</x>
				<y>11.3314</y>
				<z>5.69282</z>
			</location>
			<capacity unit="LBS">33988</capacity>
			<contents unit="LBS">13500</contents>
			<standpipe unit="LBS">31</standpipe>
			<priority>2</priority>
			<type>JET-A1</type>
			<temperature>50</temperature>
		</tank>
		<tank type="FUEL">    <!-- Tank 3 Outboard -->
			<location unit="M">
				<x>2.7152</x>
				<y>17.0253</y>
				<z>5.69282</z>
			</location>
			<capacity unit="LBS">6500</capacity>
			<contents unit="LBS">6500</contents>
			<standpipe unit="LBS">31</standpipe>
			<priority>2</priority>
			<type>JET-A1</type>
			<temperature>50</temperature>
		</tank>
		<tank type="FUEL">    <!-- Upper Aux Tank -->
			<location unit="M">
				<x>2.7152</x>
				<y>0</y>
				<z>5.69282</z>
			</location>
			<capacity unit="LBS">87105</capacity>
			<contents unit="LBS">0</contents>
			<standpipe unit="LBS">43</standpipe>
			<priority>1</priority>
			<type>JET-A1</type>
			<temperature>50</temperature>
		</tank>
		<tank type="FUEL">    <!-- Lower Aux Tank -->
			<location unit="M">
				<x>2.7152</x>
				<y>0</y>
				<z>5.69282</z>
			</location>
			<capacity unit="LBS">11001</capacity>
			<contents unit="LBS">0</contents>
			<standpipe unit="LBS">43</standpipe>
			<priority>1</priority>
			<type>JET-A1</type>
			<temperature>50</temperature>
		</tank>
		<tank type="FUEL">    <!-- Tail Tank -->
			<location unit="M">
				<x>15.0705</x>
				<y>0</y>
				<z>5.69282</z>
			</location>
			<capacity unit="LBS">13118</capacity>
			<contents unit="LBS">0</contents>
			<standpipe unit="LBS">31</standpipe>
			<priority>1</priority>
			<type>JET-A1</type>
			<temperature>50</temperature>
		</tank>
		<tank type="FUEL">    <!-- Engine 1 Pipe -->
			<location unit="M">
				<x>2.7152</x>
				<y>0</y>
				<z>5.69282</z>
			</location>
			<capacity unit="LBS">10</capacity>
			<contents unit="LBS">0</contents>
			<priority>1</priority>
			<type>JET-A1</type>
		</tank>
		<tank type="FUEL">    <!-- Engine 2 Pipe -->
			<location unit="M">
				<x>2.7152</x>
				<y>0</y>
				<z>5.69282</z>
			</location>
			<capacity unit="LBS">10</capacity>
			<contents unit="LBS">0</contents>
			<priority>1</priority>
			<type>JET-A1</type>
		</tank>
		<tank type="FUEL">    <!-- Engine 3 Pipe -->
			<location unit="M">
				<x>2.7152</x>
				<y>0</y>
				<z>5.69282</z>
			</location>
			<capacity unit="LBS">10</capacity>
			<contents unit="LBS">0</contents>
			<priority>1</priority>
			<type>JET-A1</type>
		</tank>
		<tank type="FUEL">    <!-- APU Pipe -->
			<location unit="M">
				<x>2.7152</x>
				<y>0</y>
				<z>5.69282</z>
			</location>
			<capacity unit="LBS">5</capacity>
			<contents unit="LBS">0</contents>
			<priority>1</priority>
			<type>JET-A1</type>
		</tank>
	</propulsion>

	<system file="md-11-libraries"/>
	<system file="md-11-electrical"/>
	<system file="md-11-fuel"/>
	<system file="md-11-hydraulics"/>
	<system file="md-11-irs"/>
	<system file="md-11-pneumatics"/>
	<system file="md-11-fms"/>
	<system file="md-11-fcc"/>
	<system file="md-11-fcs"/>
	<system file="md-11-spoiler"/>
	<system file="md-11-ignition"/>
	<system file="md-11-ge-engine-fadec"/>
	<system file="md-11-apu"/>
	<system file="md-11-cockpit"/>
	<system file="md-11-instrumentation"/>
	<system file="glass-effect"/>

	<flight_control name="none"/>
	<aerodynamics file="Systems/md-11-aerodynamics.xml"/>
	<external_reactions file="Systems/md-11-external-reactions"/>

</fdm_config>
