<!-- MD-11 Aerodynamics -->
<!-- Joshua Davidson (it0uchpods) -->

<!--
##############################################
# Copyright (c) Joshua Davidson (it0uchpods) #
##############################################
-->

<aerodynamics>

	<property value="0.0">ice/wing</property>

	<axis name="LIFT">

		<function name="aero/force/Lift_alpha">
			<description>Lift due to alpha</description>
			<product>
				<property>aero/qbar-psf</property>
				<property>metrics/Sw-sqft</property>
				<table>
					<independentVar lookup="row">aero/alpha-rad</independentVar>
					<tableData>
						-1.57 -1.3000
						-1.22 -1.2514
						-1.05 -1.1423
						-0.88 -1.0577
						-0.64 -0.9311
						-0.25 -0.8373
						 0.00  0.1096
						 0.25  1.5074
						 0.60  1.0101
						 0.88  0.6213
						 1.05  0.2196
						 1.22  0.0634
						 1.57  0.0000
					</tableData>
				</table>
			</product>
		</function>

		<function name="aero/force/Lift_pitch_rate">
			<description>Lift due to pitch rate</description>
			<product>
				<property>aero/qbar-psf</property>
				<property>metrics/Sw-sqft</property>
				<property>velocities/q-aero-rad_sec</property>
				<property>aero/ci2vel</property>
				<value>1.3600</value>
			</product>
		</function>

		<function name="aero/force/Lift_alpha_rate">
			<description>Lift due to alpha rate</description>
			<product>
				<property>aero/qbar-psf</property>
				<property>metrics/Sw-sqft</property>
				<property>aero/alphadot-rad_sec</property>
				<property>aero/ci2vel</property>
				<value>0.6384</value>
			</product>
		</function>

		<function name="aero/force/Lift_left_outer_elevator">
			<description>Lift due to left outer elevator deflection</description>
			<product>
				<property>aero/qbar-psf</property>
				<property>metrics/Sw-sqft</property>
				<toradians><property>hydraulics/elevator-out-l/final-deg-aero</property></toradians>
				<value>0.04325</value>
			</product>
		</function>

		<function name="aero/force/Lift_left_inner_elevator">
			<description>Lift due to left inner elevator deflection</description>
			<product>
				<property>aero/qbar-psf</property>
				<property>metrics/Sw-sqft</property>
				<toradians><property>hydraulics/elevator-in-l/final-deg-aero</property></toradians>
				<value>0.04325</value>
			</product>
		</function>

		<function name="aero/force/Lift_right_inner_elevator">
			<description>Lift due to right inner elevator deflection</description>
			<product>
				<property>aero/qbar-psf</property>
				<property>metrics/Sw-sqft</property>
				<toradians><property>hydraulics/elevator-in-r/final-deg-aero</property></toradians>
				<value>0.04325</value>
			</product>
		</function>

		<function name="aero/force/Lift_right_outer_elevator">
			<description>Lift due to right outer elevator deflection</description>
			<product>
				<property>aero/qbar-psf</property>
				<property>metrics/Sw-sqft</property>
				<toradians><property>hydraulics/elevator-out-r/final-deg-aero</property></toradians>
				<value>0.04325</value>
			</product>
		</function>

		<function name="aero/force/Lift_elevator_trim">
			<description>Lift due to elevator trim deflection</description>
			<product>
				<property>aero/qbar-psf</property>
				<property>metrics/Sw-sqft</property>
				<toradians><property>hydraulics/elevator-trim/final-deg-aero</property></toradians>
				<value>0.0127</value>
			</product>
		</function>

		<function name="aero/force/Lift_flap">
			<description>Delta Lift due to flaps</description>
			<product>
				<property>aero/qbar-psf</property>
				<property>metrics/Sw-sqft</property>
				<table>
					<independentVar lookup="row">fcs/flap-pos-norm</independentVar>
					<tableData>
						0.000  0.0000
						0.310  0.0950
						0.580  0.1412
						0.700  0.1941
						1.000  0.2512
					</tableData>
				</table>
			</product>
		</function>

		<function name="aero/force/Lift_slats">
			<description>Delta Lift due to slats</description>
			<product>
				<property>aero/qbar-psf</property>
				<property>metrics/Sw-sqft</property>
				<property>fcs/slat-pos-norm</property>
				<value>0.2541</value>
			</product>
		</function>

		<function name="aero/force/Lift_left_spoiler">
			<description>Delta Lift due to left spoiler</description>
			<product>
				<property>aero/qbar-psf</property>
				<property>metrics/Sw-sqft</property>
				<toradians><property>fcs/spoiler-left-deg</property></toradians>
				<value>-0.0349066</value>
			</product>
		</function>

		<function name="aero/force/Lift_right_spoiler">
			<description>Delta Lift due to right spoiler</description>
			<product>
				<property>aero/qbar-psf</property>
				<property>metrics/Sw-sqft</property>
				<toradians><property>fcs/spoiler-right-deg</property></toradians>
				<value>-0.0349066</value>
			</product>
		</function>

		<function name="aero/coefficient/bogey1">
			<description>Lift_due_bogey1</description>
			<product>
				<table>
					<independentVar>/gear/gear[1]/wow</independentVar>
					<tableData>
						0  0.00
						1  0.10
					</tableData>
				</table>
				<property>aero/qbar-psf</property>
				<property>metrics/Sw-sqft</property>
			</product>
		</function>

		<function name="aero/coefficient/bogey2">
			<description>Lift_due_bogey2</description>
			<product>
				<table>
					<independentVar>/gear/gear[2]/wow</independentVar>
					<tableData>
						0  0.00
						1  0.10
					</tableData>
				</table>
				<property>aero/qbar-psf</property>
				<property>metrics/Sw-sqft</property>
			</product>
		</function>

		<function name="aero/coefficient/bogey3">
			<description>Lift_due_bogey3</description>
			<product>
				<table>
					<independentVar>/gear/gear[3]/wow</independentVar>
					<tableData>
						0  0.00
						1  0.10
					</tableData>
				</table>
				<property>aero/qbar-psf</property>
				<property>metrics/Sw-sqft</property>
			</product>
		</function>

	</axis>

	<axis name="DRAG">

		<function name="aero/force/Drag_minimum">
			<description>Minimum drag</description>
			<product>
				<property>aero/qbar-psf</property>
				<property>metrics/Sw-sqft</property>
				<value>0.0175</value>
			</product>
		</function>

		<function name="aero/force/Drag_basic">
			<description>Drag at zero lift</description>
			<product>
				<property>aero/qbar-psf</property>
				<property>metrics/Sw-sqft</property>
				<table>
					<independentVar lookup="row">aero/alpha-rad</independentVar>
					<tableData>
						-1.57  1.3083
						-0.20  0.0331
						 0.00  0.0000
						 0.20  0.0331
						 1.57  1.3083
					</tableData>
				</table>
			</product>
		</function>

		<function name="aero/force/Drag_induced">
			<description>Induced drag</description>
			<product>
				<property>aero/qbar-psf</property>
				<property>metrics/Sw-sqft</property>
				<property>aero/cl-squared</property>
				<value>0.0391</value>
			</product>
		</function>

		<function name="aero/force/Drag_mach">
			<description>Drag due to mach</description>
			<product>
				<property>aero/qbar-psf</property>
				<property>metrics/Sw-sqft</property>
				<table>
					<independentVar lookup="row">velocities/mach</independentVar>
					<tableData>
						0.00  0.000
						0.20  0.000
						0.79  0.002
						1.10  0.023
						1.80  0.015
					</tableData>
				</table>
			</product>
		</function>

		<function name="aero/force/Drag_beta">
			<description>Drag due to sideslip</description>
			<product>
				<property>aero/qbar-psf</property>
				<property>metrics/Sw-sqft</property>
				<table>
					<independentVar lookup="row">aero/beta-rad</independentVar>
					<tableData>
						-1.57  1.23
						-0.26  0.05
						 0.00  0.00
						 0.26  0.05
						 1.57  1.23
					</tableData>
				</table>
			</product>
		</function>

		<function name="aero/force/Drag_left_outer_elevator">
			<description>Drag due to left outer elevator deflection</description>
			<product>
				<property>aero/qbar-psf</property>
				<property>metrics/Sw-sqft</property>
				<abs><toradians><property>hydraulics/elevator-out-l/final-deg-aero</property></toradians></abs>
				<value>0.005</value>
			</product>
		</function>

		<function name="aero/force/Drag_left_inner_elevator">
			<description>Drag due to left inner elevator deflection</description>
			<product>
				<property>aero/qbar-psf</property>
				<property>metrics/Sw-sqft</property>
				<abs><toradians><property>hydraulics/elevator-in-l/final-deg-aero</property></toradians></abs>
				<value>0.005</value>
			</product>
		</function>

		<function name="aero/force/Drag_right_inner_elevator">
			<description>Drag due to right inner elevator deflection</description>
			<product>
				<property>aero/qbar-psf</property>
				<property>metrics/Sw-sqft</property>
				<abs><toradians><property>hydraulics/elevator-in-r/final-deg-aero</property></toradians></abs>
				<value>0.005</value>
			</product>
		</function>

		<function name="aero/force/Drag_right_outer_elevator">
			<description>Drag due to right outer elevator deflection</description>
			<product>
				<property>aero/qbar-psf</property>
				<property>metrics/Sw-sqft</property>
				<abs><toradians><property>hydraulics/elevator-out-r/final-deg-aero</property></toradians></abs>
				<value>0.005</value>
			</product>
		</function>

		<function name="aero/force/Drag_elevator_trim">
			<description>Drag due to elevator trim deflection</description>
			<product>
				<property>aero/qbar-psf</property>
				<property>metrics/Sw-sqft</property>
				<abs><toradians><property>hydraulics/elevator-trim/final-deg-aero</property></toradians></abs>
				<value>0.02</value>
			</product>
		</function>

		<function name="aero/force/Drag_gear">
			<description>Drag due to gear</description>
			<product>
				<property>aero/qbar-psf</property>
				<property>metrics/Sw-sqft</property>
				<property>gear/gear-pos-norm</property>
				<value>0.0181</value>
			</product>
		</function>

		<function name="aero/force/Drag_flap">
			<description>Drag due to flaps</description>
			<product>
				<property>aero/qbar-psf</property>
				<property>metrics/Sw-sqft</property>
				<property>fcs/flap-pos-deg</property>
				<value>0.00142</value>
			</product>
		</function>

		<function name="aero/force/Drag_slat">
			<description>Drag due to slats</description>
			<product>
				<property>aero/qbar-psf</property>
				<property>metrics/Sw-sqft</property>
				<property>fcs/slat-pos-deg</property>
				<value>0.00138</value>
			</product>
		</function>

		<function name="aero/force/Drag_left_outer_aileron">
			<description>Drag due to left outer aileron</description>
			<product>
				<property>aero/qbar-psf</property>
				<property>metrics/Sw-sqft</property>
				<abs><toradians><property>hydraulics/aileron-out-l/final-deg</property></toradians></abs>
				<value>0.0023416869029109</value>
			</product>
		</function>

		<function name="aero/force/Drag_left_inner_aileron">
			<description>Drag due to left inner aileron</description>
			<product>
				<property>aero/qbar-psf</property>
				<property>metrics/Sw-sqft</property>
				<abs><toradians><property>hydraulics/aileron-in-l/final-deg</property></toradians></abs>
				<value>0.0023416869029109</value>
			</product>
		</function>

		<function name="aero/force/Drag_left_spoiler">
			<description>Drag due to left spoiler</description>
			<product>
				<property>aero/qbar-psf</property>
				<property>metrics/Sw-sqft</property>
				<toradians><property>fcs/spoiler-left-deg</property></toradians>
				<value>0.0200716020249513</value>
			</product>
		</function>

		<function name="aero/force/Drag_right_spoiler">
			<description>Drag due to right spoiler</description>
			<product>
				<property>aero/qbar-psf</property>
				<property>metrics/Sw-sqft</property>
				<toradians><property>fcs/spoiler-right-deg</property></toradians>
				<value>0.0200716020249513</value>
			</product>
		</function>

		<function name="aero/force/Drag_right_inner_aileron">
			<description>Drag due to right inner aileron</description>
			<product>
				<property>aero/qbar-psf</property>
				<property>metrics/Sw-sqft</property>
				<abs><toradians><property>hydraulics/aileron-in-r/final-deg</property></toradians></abs>
				<value>0.0023416869029109</value>
			</product>
		</function>

		<function name="aero/force/Drag_right_outer_aileron">
			<description>Drag due to right outer aileron</description>
			<product>
				<property>aero/qbar-psf</property>
				<property>metrics/Sw-sqft</property>
				<abs><toradians><property>hydraulics/aileron-out-r/final-deg</property></toradians></abs>
				<value>0.0023416869029109</value>
			</product>
		</function>

		<function name="aero/force/Drag_wingice">
			<description>Drag_due_to_ice_on_wing</description>
			<product>
				<property>aero/qbar-psf</property>
				<property>metrics/Sw-sqft</property>
				<table>
					<independentVar>ice/wing</independentVar>
					<tableData>
						0.0  0.000
						0.5  0.004
						1.0  0.010
						2.0  0.100
					</tableData>
				</table>
			</product>
		</function>

	</axis>

	<axis name="SIDE">

		<function name="aero/force/Side_beta">
			<description>Side force due to beta</description>
			<product>
				<property>aero/qbar-psf</property>
				<property>metrics/Sw-sqft</property>
				<property>aero/beta-rad</property>
				<value>-0.6093</value>
			</product>
		</function>

		<function name="aero/force/Side_roll_rate">
			<description>Side force due to roll rate</description>
			<product>
				<property>aero/qbar-psf</property>
				<property>metrics/Sw-sqft</property>
				<property>aero/bi2vel</property>
				<property>velocities/p-aero-rad_sec</property>
				<table>
					<independentVar lookup="row">aero/Re</independentVar>
					<tableData>
						29913298  0.4518
						32904628  0.0452
						44869948  0.0201
						59461352  0.0114
					</tableData>
				</table>
			</product>
		</function>

		<function name="aero/force/Side_yaw_rate">
			<description>Side force due to yaw rate</description>
			<product>
				<property>aero/qbar-psf</property>
				<property>metrics/Sw-sqft</property>
				<property>aero/bi2vel</property>
				<property>velocities/r-aero-rad_sec</property>
				<value>0.6597</value>
			</product>
		</function>

		<function name="aero/force/Side_upper_rudder">
			<description>Side force due to upper rudder</description>
			<product>
				<property>aero/qbar-psf</property>
				<property>metrics/Sw-sqft</property>
				<toradians><property>hydraulics/rudder-upper/final-deg</property></toradians>
				<value>0.08965</value>
			</product>
		</function>

		<function name="aero/force/Side_lower_rudder">
			<description>Side force due to lower rudder</description>
			<product>
				<property>aero/qbar-psf</property>
				<property>metrics/Sw-sqft</property>
				<toradians><property>hydraulics/rudder-lower/final-deg</property></toradians>
				<value>0.08965</value>
			</product>
		</function>

	</axis>

	<axis name="ROLL">

		<function name="aero/moment/Roll_beta">
			<description>Roll moment due to beta</description>
			<product>
				<property>aero/qbar-psf</property>
				<property>metrics/Sw-sqft</property>
				<property>metrics/bw-ft</property>
				<property>aero/beta-rad</property>
				<value>-0.1</value>
			</product>
		</function>

		<function name="aero/moment/Roll_damp">
			<description>Roll moment due to roll rate</description>
			<product>
				<property>aero/qbar-psf</property>
				<property>metrics/Sw-sqft</property>
				<property>metrics/bw-ft</property>
				<property>aero/bi2vel</property>
				<property>velocities/p-aero-rad_sec</property>
				<value>-0.54</value>
			</product>
		</function>

		<function name="aero/moment/Roll_yaw">
			<description>Roll moment due to yaw rate</description>
			<product>
				<property>aero/qbar-psf</property>
				<property>metrics/Sw-sqft</property>
				<property>metrics/bw-ft</property>
				<property>aero/bi2vel</property>
				<property>velocities/r-aero-rad_sec</property>
				<value>0.2</value>
			</product>
		</function>

		<function name="aero/moment/Roll_left_outer_aileron">
			<description>Roll moment due to left outer aileron</description>
			<product>
				<property>aero/qbar-psf</property>
				<property>metrics/Sw-sqft</property>
				<property>metrics/bw-ft</property>
				<toradians><property>hydraulics/aileron-out-l/final-deg-aero</property></toradians>
				<value>0.0196</value>
			</product>
		</function>

		<function name="aero/moment/Roll_left_inner_aileron">
			<description>Roll moment due to left inner aileron</description>
			<product>
				<property>aero/qbar-psf</property>
				<property>metrics/Sw-sqft</property>
				<property>metrics/bw-ft</property>
				<toradians><property>hydraulics/aileron-in-l/final-deg-aero</property></toradians>
				<value>0.0173</value>
			</product>
		</function>

		<function name="aero/moment/Roll_right_inner_aileron">
			<description>Roll moment due to right inner aileron</description>
			<product>
				<property>aero/qbar-psf</property>
				<property>metrics/Sw-sqft</property>
				<property>metrics/bw-ft</property>
				<toradians><property>hydraulics/aileron-in-r/final-deg-aero</property></toradians>
				<value>-0.0173</value>
			</product>
		</function>

		<function name="aero/moment/Roll_right_outer_aileron">
			<description>Roll moment due to right outer aileron</description>
			<product>
				<property>aero/qbar-psf</property>
				<property>metrics/Sw-sqft</property>
				<property>metrics/bw-ft</property>
				<toradians><property>hydraulics/aileron-out-r/final-deg-aero</property></toradians>
				<value>-0.0186</value>
			</product>
		</function>

		<function name="aero/moment/Roll_left_spoiler">
			<description>Roll moment due to left spoiler</description>
			<product>
				<property>aero/qbar-psf</property>
				<property>metrics/Sw-sqft</property>
				<property>metrics/bw-ft</property>
				<toradians><property>fcs/spoiler-left-deg</property></toradians>
				<value>-0.0162</value>
			</product>
		</function>

		<function name="aero/moment/Roll_right_spoiler">
			<description>Roll moment due to right spoiler</description>
			<product>
				<property>aero/qbar-psf</property>
				<property>metrics/Sw-sqft</property>
				<property>metrics/bw-ft</property>
				<toradians><property>fcs/spoiler-right-deg</property></toradians>
				<value>0.0162</value>
			</product>
		</function>

		<function name="aero/moment/Roll_upper_rudder">
			<description>Roll moment due to upper rudder</description>
			<product>
				<property>aero/qbar-psf</property>
				<property>metrics/Sw-sqft</property>
				<property>metrics/bw-ft</property>
				<toradians><property>hydraulics/rudder-upper/final-deg</property></toradians>
				<value>0.005</value>
			</product>
		</function>

		<function name="aero/moment/Roll_lower_rudder">
			<description>Roll moment due to lower rudder</description>
			<product>
				<property>aero/qbar-psf</property>
				<property>metrics/Sw-sqft</property>
				<property>metrics/bw-ft</property>
				<toradians><property>hydraulics/rudder-lower/final-deg</property></toradians>
				<value>0.005</value>
			</product>
		</function>

	</axis>

	<axis name="PITCH">

		<function name="aero/moment/Pitch_alpha">
			<description>Pitch moment due to alpha</description>
			<product>
				<property>aero/qbar-psf</property>
				<property>metrics/Sw-sqft</property>
				<property>metrics/cbarw-ft</property>
				<property>aero/alpha-rad</property>
				<value>-0.7918</value>
			</product>
		</function>

		<function name="aero/moment/Pitch_left_outer_elevator">
			<description>Pitch moment due to left outer elevator</description>
			<product>
				<property>aero/qbar-psf</property>
				<property>metrics/Sw-sqft</property>
				<property>metrics/cbarw-ft</property>
				<toradians><property>hydraulics/elevator-out-l/final-deg-aero</property></toradians>
				<value>-0.12775</value>
			</product>
		</function>

		<function name="aero/moment/Pitch_left_inner_elevator">
			<description>Pitch moment due to left inner elevator</description>
			<product>
				<property>aero/qbar-psf</property>
				<property>metrics/Sw-sqft</property>
				<property>metrics/cbarw-ft</property>
				<toradians><property>hydraulics/elevator-in-l/final-deg-aero</property></toradians>
				<value>-0.12775</value>
			</product>
		</function>

		<function name="aero/moment/Pitch_right_inner_elevator">
			<description>Pitch moment due to right inner elevator</description>
			<product>
				<property>aero/qbar-psf</property>
				<property>metrics/Sw-sqft</property>
				<property>metrics/cbarw-ft</property>
				<toradians><property>hydraulics/elevator-in-r/final-deg-aero</property></toradians>
				<value>-0.12775</value>
			</product>
		</function>

		<function name="aero/moment/Pitch_right_outer_elevator">
			<description>Pitch moment due to right outer elevator</description>
			<product>
				<property>aero/qbar-psf</property>
				<property>metrics/Sw-sqft</property>
				<property>metrics/cbarw-ft</property>
				<toradians><property>hydraulics/elevator-out-r/final-deg-aero</property></toradians>
				<value>-0.12775</value>
			</product>
		</function>

		<function name="aero/moment/Pitch_elevator_trim">
			<description>Pitch moment due to elevator trim</description>
			<product>
				<property>aero/qbar-psf</property>
				<property>metrics/Sw-sqft</property>
				<property>metrics/cbarw-ft</property>
				<toradians><property>hydraulics/elevator-trim/final-deg-aero</property></toradians>
				<value>-2.057</value>
			</product>
		</function>

		<function name="aero/moment/Pitch_damp">
			<description>Pitch moment due to pitch rate</description>
			<product>
				<property>aero/qbar-psf</property>
				<property>metrics/Sw-sqft</property>
				<property>metrics/cbarw-ft</property>
				<property>aero/ci2vel</property>
				<property>velocities/q-aero-rad_sec</property>
				<value>-29</value>
			</product>
		</function>

		<function name="aero/moment/Pitch_alphadot">
			<description>Pitch moment due to alpha rate</description>
			<product>
				<property>aero/qbar-psf</property>
				<property>metrics/Sw-sqft</property>
				<property>metrics/cbarw-ft</property>
				<property>aero/ci2vel</property>
				<property>aero/alphadot-rad_sec</property>
				<value>-1.1356</value>
			</product>
		</function>

	</axis>

	<axis name="YAW">

		<function name="aero/moment/Yaw_beta">
			<description>Yaw moment due to beta</description>
			<product>
				<property>aero/qbar-psf</property>
				<property>metrics/Sw-sqft</property>
				<property>metrics/bw-ft</property>
				<property>aero/beta-rad</property>
				<value>0.1292</value>
			</product>
		</function>

		<function name="aero/moment/Yaw_roll_rate">
			<description>Yaw moment due to roll rate</description>
			<product>
				<property>aero/qbar-psf</property>
				<property>metrics/Sw-sqft</property>
				<property>metrics/bw-ft</property>
				<property>aero/bi2vel</property>
				<property>velocities/r-aero-rad_sec</property>
				<value>-0.2</value>
			</product>
		</function>

		<function name="aero/moment/Yaw_damp">
			<description>Yaw moment due to yaw rate</description>
			<product>
				<property>aero/qbar-psf</property>
				<property>metrics/Sw-sqft</property>
				<property>metrics/bw-ft</property>
				<property>aero/bi2vel</property>
				<property>velocities/r-aero-rad_sec</property>
				<value>-0.1</value>
			</product>
		</function>

		<function name="aero/moment/Yaw_upper_rudder">
			<description>Yaw moment due to upper rudder</description>
			<product>
				<property>aero/qbar-psf</property>
				<property>metrics/Sw-sqft</property>
				<property>metrics/bw-ft</property>
				<toradians><property>hydraulics/rudder-upper/final-deg</property></toradians>
				<value>0.015</value>
			</product>
		</function>

		<function name="aero/moment/Yaw_lower_rudder">
			<description>Yaw moment due to lower rudder</description>
			<product>
				<property>aero/qbar-psf</property>
				<property>metrics/Sw-sqft</property>
				<property>metrics/bw-ft</property>
				<toradians><property>hydraulics/rudder-lower/final-deg</property></toradians>
				<value>0.015</value>
			</product>
		</function>

	</axis>

</aerodynamics>
